Simulations: Version=117
  Replacements
    Plant Oats: PlantType=Wheat; IsAlive=false; IsEnding=false; DaysAfterEnding=0
      Memo Introduction
        # The APSIM Oats Model

        _Allan Peake, Hamish Brown, Rob Zyskowski, Edmar I. Teixeira, Neil Huth_

        The APSIM oats model has been developed using the Plant Modelling Framework (PMF) of [brown_plant_2014]. This new framework provides a library of plant organ and process submodels that can be coupled, at runtime, to construct a model in much the same way that models can be coupled to construct a simulation. This means that dynamic composition of lower level process and organ classes (e.g. photosynthesis, leaf) into larger constructions (e.g. maize, wheat, sorghum) can be achieved by the model developer without additional coding.

        The oats model consists of:

        * a phenology model to simulate development through sequential growth phases
        * a structure model to simulate plant morphology
        * a collection of organs to simulate the various plant parts
        * an arbitrator to allocate resources (N, biomass) to the various plant organs

        This work builds upon an earlier APSIM Oats model that was constructed in 2007 and then published at the Australian Agronomy Conference in 2008 using data from Gatton, Tarlee and Pinery ([unkovich_development_2008]). However numerous changes have been made in the APSIM NextGen version, so simulations run under APSIM 7.10 and previous versions will give different predictions when run with APSIM NextGen.

        The Oats model is broadly based on APSIM Wheat models such as NWheat ([Asseng200225], [KeatingNWheat]), NWheatS ([Asseng1998163]), Cropmod-Wheat ([Wang2002GenericCropModel]), and the earlier versions developed within the Plant Modelling Framework ([brown_plant_2014]).
      OrganArbitrator Arbitrator
        BiomassTypeArbitrator DMArbitration
          Folder PotentialPartitioningMethods
            ReallocationMethod
            AllocateFixationMethod
            RetranslocationMethod
            SendPotentialDMAllocationsMethod
          Folder AllocationMethods
            NutrientConstrainedAllocationMethod
            DryMatterAllocationsMethod
          RelativeAllocation ArbitrationMethod
        BiomassTypeArbitrator NArbitration
          Folder PotentialPartitioningMethods
            ReallocationMethod
          Folder ActualPartitioningMethods
            AllocateFixationMethod
            RetranslocationMethod
          Folder AllocationMethods
            NitrogenAllocationsMethod
          RelativeAllocation ArbitrationMethod
          AllocateUptakesMethod
        WaterUptakeMethod
        NitrogenUptakeMethod
      Phenology
        Memo
          Oat crops exhibit a range of developmental responses to environment and these are strongly influences by genotype characteristics.
          Temperature effects development increasing development rates and decreasing phase durations as temperatures increase.  These effects are captured by thermal time.  However, Oat crops also exhibit vernalisation and photoperiod sensitivities in their Vegetative phase and further photoperiod sensitivity in the EarlyReproductive phase.  Photoperiod responses are seen as a reduction in the length of a phase for a photoperiod sensitive genotype in response to a longer photoperiod.  Vernalisation responses are more complicated as they are driven by temperature but interact with photoperiod.  For vernalisation sensitive varieties (Winter types) exposure to cool temperatures or short photoperiods during the Vegetative phase will reduce the thermal time duration of the vegetative phase.

          As used in the APSIM wheat model, we draw on the Kirby Framework to capture these vernalisation and photoperiod responses.  This framework assumes that the timing of anthesis is a result of the timing of flag leaf and an additional thermal time passage from there to anthesis.  It also assumes the timing of flag leaf is a result of the Final Leaf Number which sets a target, and leaf appearance rate, which sets the rate of progress toward this target.  Leaf appearance rate is a function of Thermal time and a genotype specific Phyllochron which changes with Haun stage as described by [Jamieson_LeafAppearance_1995].

          Final Leaf Number (FLN) is modelled as the sum of three numbers:

          FLN = MinLeafNumber + VernalLeaves + PhotoLeaves

          Where MinLeafNumber is the number of leaves that a wheat crop will produce when vernalisation is satisified early in the crops duration (before 2nd true leaf) and it is grown in a long photoperiod.  VernalLeaves are the number of leaves that are added due to vernalisation effects.  For insensitive varieties this will always be zero but this is potentially a larger number for sensitivie varieties and the number progresively decreases as the crop encounters more vernalisation.  PhotoLeaves are the number of leaves that are added to the minimum leaf number as a result of short day exposure.  For insensitive varieties this will be zero but is potential larger for more sensitivie varieties and decreases as day length increases.  More detailed explinations of the components of phenology are provided below.
        DivideFunction MeanTemp
          AddFunction TempSum
            VariableReference MaxT: VariableName=[Weather].MaxT
            VariableReference MinT: VariableName=[Weather].MinT
          Constant Two: FixedValue=2
        HourlyInterpolation ThermalTime: agregationMethod=0
          XYPairs Response: X=[0, 30, 40]; Y=[0, 30, 0]
          Memo
            Thermal time determines the rate of developmental progress through many of the crops phases and is used by organs to determing potential growth rates.
          ThreeHourSin InterpolationMethod
        MultiplyFunction DailyVernalisation
          Memo
            Vernalisation responses are based on those described by [Brown_Anthesis_2013].   Vernalisation is assumed to be related to the expression of the Vrn1 Gene.  Its experssion is accumulated daily and daily upregulation as a function of development (DeltaHaunStage) and a TempResponseProfile that declines exponentially from a maximum at 1<sup>o</sup>C to zero at 0<sup>o</sup>C and at 20<sup>o</sup>C.
          VariableReference DeltaHaunStage: VariableName=[Structure].DeltaHaunStage
          HourlyInterpolation TempResponseProfile: agregationMethod=0
            XYPairs Response
              X=[0, 1, 2, 3, 4, 5, 6, 7, 8, 9, 10, 11, 12, 13, 14, 15, 16, 17, 18, 19, 20, 30, 32]
              Y=[0, 1.205, 1.037, 0.893, 0.768, 0.661, 0.569, 0.49, 0.422, 0.363, 0.312, 0.269, 0.231, 0.199, 0.171, 0.148, 0.127, 0.109, 0.094, 0.081, 0, 0, -0.5]
            ThreeHourSin InterpolationMethod
        PhotoperiodFunction Photoperiod: Twilight=-6; DayLength=0
        PhaseLookup PerceivedPhotoPeriod
          PhaseLookupValue ApexBelowGround: Start=Germination; End=Emergence
            Constant Photoperiod: FixedValue=0; Units=h
          PhaseLookupValue ApexAboveGround: Start=Emergence; End=HarvestRipe
            VariableReference Photoperiod: VariableName=[Phenology].Photoperiod
        MinimumFunction Vrn1
          Memo
            Vrn1 accumulation begins when Vrn4 experssion is down-regulated to zero and stops, assuming vernalisation saturation, at a value of 1
          Constant Saturation: FixedValue=1; Units=Relative Experssion
          AccumulateFunction CurrentExpression: StartStageName=Germination; EndStageName=TerminalSpikelet; FractionRemovedOnCut=0; FractionRemovedOnHarvest=0; FractionRemovedOnGraze=0; FractionRemovedOnPrune=0
            LessThanFunction Vernalisation
              VariableReference If_Vrn4: VariableName=[Phenology].Vrn4
              VariableReference IsLessThanLag: VariableName=[Phenology].VernLag
              Constant Return_Zero: FixedValue=0
              VariableReference elseReturn_Vernalisation: VariableName=[Phenology].DailyVernalisation
        MinimumFunction Vrn4
          VariableReference MaxExpression: VariableName=[Phenology].VernLag
          AccumulateFunction CurrentExpression: StartStageName=Germination; EndStageName=TerminalSpikelet; FractionRemovedOnCut=0; FractionRemovedOnHarvest=0; FractionRemovedOnGraze=0; FractionRemovedOnPrune=0
            VariableReference VernalisationConditioning: VariableName=[Phenology].DailyVernalisation
        Constant MinimumLeafNumber: FixedValue=7; Units=Leaves
          Memo
            Number of leaves the plant will produce when fully vernalised early and grown in long photoperiod
        Constant VrnSensitivity: FixedValue=0; Units=Leaves
          Memo
            The difference between Inherent earlyness leaf number and the number of leaves produced when the plant is unvernalised and grown in long photoperiod
        Constant VernLag: FixedValue=1; Units=Unitless
          Memo
            The amount of vernalising temperature required before vernalisation response will be evident.  Value of relative to the amount offl vernalisation temperature required from the end of the lag until vernalisation saturation.  A value of 0 means there is no lag, a value of 1 means the lag is the same (in vernal time) as the vernalisation requirement and a value of 2 means the lag is twice as long as the vernalisation response phase
        Constant PpSensitivity: FixedValue=3; Units=Leaves
          Memo
            The reduction in leaf number going from 8 to 16 h Pp
        Constant EarlyReproductivePpSensitivity: FixedValue=3
          Memo
            The phyllochrons duration for the plant to go from flag leaf ligual appearance at 16 h Pp compared to the phyllochron duration for the same phase at 8 h Pp.
        Constant EarlyReproductiveLongDayBase: FixedValue=3
          Memo
            The phyllochrons duration for the plant to go from flag leaf ligual appearance at 16 h Pp.
        GerminatingPhase Germinating: Start=Sowing; End=Germination
        EmergingPhase Emerging: ShootLag=40; ShootRate=4; Start=Germination; End=Emergence; TTForTimeStep=0
          VariableReference ThermalTime: VariableName=[Phenology].ThermalTime
        GenericPhase Vegetative: Start=Emergence; End=TerminalSpikelet
          Memo
            The duration of the vegetative phase is set by a target Haun Stage for the occurence of Terminal Spikelet and the rate of leaf appearance.
          VariableReference Progression: VariableName=[Phenology].ThermalTime
          MultiplyFunction Target
            VariableReference Phyllochron: VariableName=[Structure].MeanPhyllochron
            VariableReference HSTS: VariableName=[Structure].HaunStageTerminalSpikelet
          Memo Memo1
            HaunStageTerminalSpiklet decreases as vernalisation is accumulated and as photoperiod extends, capturing the effect of these responses on the duration of the Vegetative phase
        LeafAppearancePhase StemElongation: Start=TerminalSpikelet; End=FlagLeaf
          Memo
            The Final leaf number is fixed at Terminal Spikelet and leaves contune to appear at a rate set by thermal time and phyllochron until flag leaf liguale appears and this phase is completed.
          VariableReference ThermalTime: VariableName=[Phenology].ThermalTime
          VariableReference FinalLeafNumber: VariableName=[Structure].FinalLeafNumber
          ExpressionFunction LeafNumber
            Expression=[Leaf].ExpandedCohortNo + [Leaf].NextExpandingLeafProportion
          VariableReference FullyExpandedLeafNo: VariableName=[Leaf].ExpandedCohortNo
          VariableReference InitialisedLeafNumber: VariableName=[Leaf].InitialisedCohortNo
        GenericPhase EarlyReproductive: Start=FlagLeaf; End=Flowering
          VariableReference Progression: VariableName=[Phenology].ThermalTime
          MultiplyFunction Target
            VariableReference Phyllochron: VariableName=[Structure].Phyllochron.BasePhyllochron
            AddFunction Phyllochrons
              VariableReference LongDayBase: VariableName=[Phenology].EarlyReproductiveLongDayBase
              MultiplyFunction IncreaseDueToShortPhotoPeriod
                LinearInterpolationFunction PhotoPeriodResponse
                  XYPairs: X=[11, 16]; Y=[1, 0]
                  VariableReference XValue: VariableName=[Phenology].Photoperiod
                VariableReference PpSensitivity: VariableName=[Phenology].EarlyReproductivePpSensitivity
        GenericPhase GrainDevelopment: Start=Flowering; End=StartGrainFill
          Constant Target: FixedValue=20
          VariableReference Progression: VariableName=[Phenology].ThermalTime
        GenericPhase GrainFilling: Start=StartGrainFill; End=EndGrainFill
          Constant Target: FixedValue=650
          VariableReference Progression: VariableName=[Phenology].ThermalTime
        GenericPhase Maturing: Start=EndGrainFill; End=Maturity
          Constant Target: FixedValue=30
          VariableReference Progression: VariableName=[Phenology].ThermalTime
        GenericPhase Ripening: Start=Maturity; End=HarvestRipe
          Constant Target: FixedValue=100
          VariableReference Progression: VariableName=[Phenology].ThermalTime
        EndPhase ReadyForHarvesting: Start=HarvestRipe; End=Unused
          VariableReference ThermalTime: VariableName=[Phenology].ThermalTime
        ZadokPMF Zadok
        OnEventFunction FlagLeafDAS: SetEvent=FlagLeaf; ReSetEvent=never
          Memo
            A function is used to provide the date of flag leaf (fully emerged) as days after sowing(DAS).
          Constant PreEventValue: FixedValue=0
          VariableReference PostEventValue: VariableName=[Plant].DaysAfterSowing
        OnEventFunction FloweringDAS: SetEvent=Flowering; ReSetEvent=never
          Memo
            A function is used to provide flowering date as days after sowing(DAS).
          Constant PreEventValue: FixedValue=0
          VariableReference PostEventValue: VariableName=[Plant].DaysAfterSowing
        OnEventFunction MaturityDAS: SetEvent=Maturity; ReSetEvent=never
          Memo
            A function is used to provide maturity date as days after sowing(DAS).
          Constant PreEventValue: FixedValue=0
          VariableReference PostEventValue: VariableName=[Plant].DaysAfterSowing
      Structure: CohortInitialisationStage=Germination; LeafInitialisationStage=Emergence
        VariableReference ThermalTime: VariableName=[Phenology].ThermalTime
        MultiplyFunction Phyllochron
          Memo Rational
            This is the thermal time between the emergence of leaf tips.  The model used here is based on [Jamieson_SIRIUS_1998] where leaf appearace could be described by a base phyllochron determined between leaves 2 and 7 and a phyllochron that was 70% of base phyllochron for leaves < 2 and 130% of base phyllochron for leaves > 7
          LinearInterpolationFunction LeafStageFactor
            XYPairs: X=[0, 2, 3, 6, 8, 11, 12]; Y=[0.75, 0.75, 1, 1, 1.4, 1.4, 1.4]
              Memo
                Changing 4th line from 7:1 to 6:1.
                Leaf appearance rate calibrated using data from Gatton 2007 for Taipan and Coolibah
            VariableReference XValue: VariableName=[Leaf].AppearedCohortNo
          Constant BasePhyllochron: FixedValue=90; Units=oC.d
          LinearInterpolationFunction PhotoPeriodEffect
            XYPairs: X=[8, 12, 14]; Y=[1.6, 1, 1]
            VariableReference XValue: VariableName=[Phenology].Photoperiod
        MultiplyFunction BranchingRate
          Memo
            Potential branching rate is determined by the commonly observed pattern of tillering in wheat, in which each tiller emerges with the third leaf on its parent axis (e.g. first tiller emerges at the same time as the third leaf on the main stem, the first secondary tiller appears with the third leaf on tiller 1).  This is described as a simple function of main stem leaf number. This function is varied occasionally between Oat cultivars due to the wide range of plant habits.
          PhaseLookup PotentialBranchingRate
            PhaseLookupValue Vegetative: Start=Emergence; End=TerminalSpikelet
              LinearInterpolationFunction PotentialBranchingRate
                XYPairs: X=[1, 2, 3, 4, 5, 6, 7, 8]; Y=[0, 0, 1, 2, 4, 7, 12, 20]
                VariableReference XValue: VariableName=[Structure].LeafTipsAppeared
            PhaseLookupValue Reproductive: Start=TerminalSpikelet; End=HarvestRipe
              Constant Zero: FixedValue=0
          MinimumFunction StressFactors
            LinearInterpolationFunction NitrogenEffect
              Memo
                Inadequate Nitrogen supply is assumed to affect tillering prior to any effect on photosynthesis or leaf size.
              XYPairs: X=[0.5, 1]; Y=[0, 1]
              VariableReference XValue: VariableName=[Arbitrator].FN
            LinearInterpolationFunction CoverEffect
              Memo
                Tillering is said to cease once a threshold fraction of incoming radiation has been achieved.  This captures shading effects on tillering described by [evers2006cessation].
              XYPairs: X=[0, 0.1, 0.5]; Y=[1, 1, 0]
              VariableReference XValue: VariableName=[Leaf].CoverTotal
            LinearInterpolationFunction WaterStressEffect
              XYPairs: X=[0, 1]; Y=[0, 1]
              VariableReference XValue: VariableName=[Root].WaterTensionFactor
        PhaseLookup BranchMortality
          PhaseLookupValue MortalityPhase: Start=TerminalSpikelet; End=Flowering
            MultiplyFunction Mortality
              LinearInterpolationFunction MortalityPerDegDay
                XYPairs: X=[0, 0.005]; Y=[0.002, 0]
                VariableReference XValue: VariableName=[Structure].MeanTillerGrowthRate
              VariableReference ThermalTime: VariableName=[Phenology].ThermalTime
        HeightFunction HeightModel
          LinearInterpolationFunction PotentialHeight
            XYPairs: X=[3, 3.8, 5, 6]; Y=[20, 300, 1100, 1200]
            VariableReference XValue: VariableName=[Phenology].Stage
          LinearInterpolationFunction WaterStress
            XYPairs: X=[0.3, 1]; Y=[0, 1]
            VariableReference XValue: VariableName=[Oats].Leaf.Fw
        MovingAverageFunction MeanTillerGrowthRate: NumberOfDays=5; StageToStartMovingAverage=Emergence
          Memo
            This is calculated to represent the supply of asslimilate to individual tillers over the past 5 days to use as an index to determine tiller mortality.  When tiller numbers are high or total crop assimilate supply is small there will not be enough assimilate to maintain all of the tillers so the model will senesce some.
          DivideFunction TillerGrowthRate
            VariableReference DailyGrowth: VariableName=[Arbitrator].DM.TotalFixationSupply
            VariableReference ThermalTime: VariableName=[Phenology].ThermalTime
            VariableReference StemPopulation: VariableName=[Structure].TotalStemPopn
        MovingAverageFunction MeanPhyllochron: NumberOfDays=300; StageToStartMovingAverage=Emergence
          VariableReference Phyllochron: VariableName=[Structure].Phyllochron
        HoldFunction FinalLeafNumber: WhenToHold=TerminalSpikelet
          AddFunction FinalNodeNumber
            VariableReference MinLeafNumber: VariableName=[Phenology].MinimumLeafNumber
            MultiplyFunction VernalLeaves
              VariableReference UnVernalisedLeaves: VariableName=[Phenology].VrnSensitivity
              SubtractFunction VernalisationReductionFactor
                Constant One: FixedValue=1
                VariableReference RelativeVrn1Expression: VariableName=[Phenology].Vrn1
            MultiplyFunction PhotoPLeaves
              VariableReference ShortPpLeaves: VariableName=[Phenology].PpSensitivity
              LinearInterpolationFunction PhotoPeriodReductionFactor
                XYPairs: X=[10, 16]; Y=[1, 0]
                VariableReference XValue: VariableName=[Phenology].Photoperiod
        ExpressionFunction HaunStageTerminalSpikelet: Expression=([Structure].FinalLeafNumber - 2.85)/1.1
          Memo
            The Haun stage at which Terminal Spikelet occurs is determined from final leaf number using the approach described in [Brown_Anthesis_2013].
        AddFunction HaunStage
          VariableReference AppearedLeaves: VariableName=[Leaf].ExpandedCohortNo
          VariableReference ProportionOfExpandingLeaf: VariableName=[Leaf].NextExpandingLeafProportion
        Constant StemSenescenceAge: FixedValue=0
      ReproductiveOrgan Grain: GrowthRespiration=0; MaintenanceRespiration=0; RipeStage=Ripe
        Biomass Live: DMDOfStructural=0.6
        Biomass Dead: DMDOfStructural=0.6
        Memo
          As with Barley, Oats grain is typically harvested by farmers still in its husk (i.e. the palea and lemma remain attached to the kernel/caryopsis), while the kernel proper is typically smaller than a wheat grain grown under similar conditions. For simplicity (and in the absence of an extensive grain-oats data set) the Oats model uses the same grain size model as wheat, with the assumption that the weight of the oats kernel includes the weight of the husk (which is not included within kernel weight in the wheat model).

          Grain number prediction is also derived directly from the wheat model, estimated as a constant number of grains (default=26) per unit of stem+spike dry matter at anthesis. This approach has known limitations and investigation is underway to improve this function in the future.
        HoldFunction NumberFunction: WhenToHold=Flowering
          MultiplyFunction GrainNumber
            Constant GrainsPerGramOfStem: FixedValue=26; Units=grains
            VariableReference StemMass: VariableName=[StemPlusPanicle].Wt
        Constant InitialGrainProportion: FixedValue=0.05
          Constant InitialGrainProportion: FixedValue=0.05
        Constant MaximumPotentialGrainSize: FixedValue=0.032; Units=g
        PhaseLookup DMDemandFunction
          PhaseLookupValue InitialPhase: Start=Flowering; End=StartGrainFill
            FillingRateFunction
              VariableReference NumberFunction: VariableName=[Grain].NumberFunction
              VariableReference FillingDuration: VariableName=[Phenology].GrainDevelopment.Target
              VariableReference ThermalTime: VariableName=[Phenology].ThermalTime
              MultiplyFunction PotentialSizeIncrement
                VariableReference InitialProportion: VariableName=[Grain].InitialGrainProportion
                VariableReference MaximumSize: VariableName=[Grain].MaximumPotentialGrainSize
          PhaseLookupValue LinearPhase: Start=StartGrainFill; End=EndGrainFill
            FillingRateFunction
              VariableReference NumberFunction: VariableName=[Grain].NumberFunction
              VariableReference FillingDuration: VariableName=[Phenology].GrainFilling.Target
              VariableReference ThermalTime: VariableName=[Phenology].ThermalTime
              MultiplyFunction PotentialSizeIncrement
                SubtractFunction ProportionLinearPhase
                  Constant One: FixedValue=1
                  VariableReference InitialProportion: VariableName=[Grain].InitialGrainProportion
                VariableReference MaximumSize: VariableName=[Grain].MaximumPotentialGrainSize
        Constant MinimumNConc: FixedValue=0.0123
        Constant MaxNConcDailyGrowth: FixedValue=0.03
        Constant MaximumNConc: FixedValue=0.03
        PhaseLookup NFillingRate
          PhaseLookupValue GrainFilling: Start=FlagLeaf; End=EndGrainFill
            FillingRateFunction
              VariableReference NumberFunction: VariableName=[Grain].NumberFunction
              AddFunction FillingDuration
                VariableReference FloweringToGrainFilling: VariableName=[Phenology].GrainDevelopment.Target
                VariableReference GrainFilling: VariableName=[Phenology].GrainFilling.Target
              VariableReference ThermalTime: VariableName=[Phenology].ThermalTime
              MultiplyFunction PotentialSizeIncrement
                VariableReference MaximumSize: VariableName=[Grain].MaximumPotentialGrainSize
                VariableReference MaximumNConc: VariableName=[Grain].MaximumNConc
        Constant WaterContent: FixedValue=0.12
        AccumulateFunction AccumThermalTime: StartStageName=FlagLeaf; EndStageName=Maturity; FractionRemovedOnCut=0; FractionRemovedOnHarvest=0; FractionRemovedOnGraze=0; FractionRemovedOnPrune=0
          VariableReference DailyThermalTimeValue: VariableName=[Phenology].ThermalTime
        ExpressionFunction Protein
          Expression=([Grain].Live.N + [Grain].Dead.N)/([Grain].Live.Wt + [Grain].Dead.Wt) * 100 * 5.71
        BiomassRemoval BiomassRemovalDefaults
          Memo
            Prune, graze and thin have been set to zero as they will vary depending on the needs of the user, and they can be overwritten in the manager script.
          OrganBiomassRemovalType Harvest: FractionLiveToRemove=1; FractionDeadToRemove=1; FractionLiveToResidue=0; FractionDeadToResidue=0
          OrganBiomassRemovalType Cut: FractionLiveToRemove=1; FractionDeadToRemove=1; FractionLiveToResidue=0; FractionDeadToResidue=0
          OrganBiomassRemovalType Prune: FractionLiveToRemove=0; FractionDeadToRemove=0; FractionLiveToResidue=0; FractionDeadToResidue=0
          OrganBiomassRemovalType Graze: FractionLiveToRemove=0; FractionDeadToRemove=0; FractionLiveToResidue=0; FractionDeadToResidue=0
          OrganBiomassRemovalType Thin: FractionLiveToRemove=0; FractionDeadToRemove=0; FractionLiveToResidue=0; FractionDeadToResidue=0
        Constant DMConversionEfficiency: FixedValue=1
        Constant remobilisationCost: FixedValue=0
        Constant CarbonConcentration: FixedValue=0.4
      Leaf: MaxCover=1; Albedo=0.25; Gsmax350=0.011; R50=150; KDead=0.1; MaximumMainStemLeafNumber=30
        zero: CurrentExpandingLeaf, StartFractionExpanded, FractionNextleafExpanded, DeadNodesYesterday, GrowthRespiration, LAI, Depth, Width, FRGR, PotentialEP, WaterDemand, TipsAtEmergence, CohortsAtInitialisation, FractionDied
        ExpressionFunction CO2internal: Expression=(163 - [IWeather].MeanT)/(5 - 0.1*[IWeather].MeanT)
        DivideFunction StomatalConductanceCO2Modifier
          VariableReference FCO2: VariableName=[Leaf].Photosynthesis.FCO2
          ExpressionFunction RelativeCO2Gradient
            Expression=([IWeather].CO2 - [Leaf].CO2internal)/(350 - [Leaf].CO2internal)
        LeafCohort InitialLeaves[1]: Rank=1; Area=200
          zero: NReallocationFactor, DMReallocationFactor, NRetranslocationFactor, DMRetranslocationFactor, ShadeInducedSenRate, SenescedFrac, DeltaPotentialArea, DeltaStressConstrainedArea, DeltaCarbonConstrainedArea, PotentialStructuralDMAllocation, PotentialMetabolicDMAllocation, MetabolicNReallocated, MetabolicWtReallocated, StorageNReallocated, StorageWtReallocated, MetabolicNRetranslocated, StorageNRetrasnlocated, DMRetranslocated, MetabolicNAllocation, StructuralDMAllocation, MetabolicDMAllocation, MaintenanceRespiration
        LeafCohort InitialLeaves[2]: Rank=2
          zero: NReallocationFactor, DMReallocationFactor, NRetranslocationFactor, DMRetranslocationFactor, ShadeInducedSenRate, SenescedFrac, DeltaPotentialArea, DeltaStressConstrainedArea, DeltaCarbonConstrainedArea, PotentialStructuralDMAllocation, PotentialMetabolicDMAllocation, MetabolicNReallocated, MetabolicWtReallocated, StorageNReallocated, StorageWtReallocated, MetabolicNRetranslocated, StorageNRetrasnlocated, DMRetranslocated, MetabolicNAllocation, StructuralDMAllocation, MetabolicDMAllocation, Area, MaintenanceRespiration
        LeafCohortParameters CohortParameters: ExpansionStressValue=0; CellDivisionStressValue=0; DroughtInducedLagAccelerationValue=0; DroughtInducedSenAccelerationValue=0; ShadeInducedSenescenceRateValue=0; SenessingLeafRelativeSizeValue=0
          Constant NReallocationFactor: FixedValue=1
          Constant MaintenanceRespirationFunction: FixedValue=0
          Constant NRetranslocationFactor: FixedValue=0.03
          Constant DMReallocationFactor: FixedValue=1
          Constant DMRetranslocationFactor: FixedValue=0.8
          MinimumFunction CellDivisionStress
            LinearInterpolationFunction WaterStressFactor
              XYPairs: X=[0.5, 1]; Y=[0.1, 1]
              VariableReference XValue: VariableName=[Oats].Leaf.Fw
            LinearInterpolationFunction NitrogenStressFactor
              XYPairs: X=[0, 0.5, 1]; Y=[0.1, 0.1, 1]
              VariableReference XValue: VariableName=[Oats].Leaf.Fn
          MinimumFunction ExpansionStress
            LinearInterpolationFunction WaterStress
              XYPairs: X=[0.1, 1, 1.3]; Y=[0, 1, 1]
              VariableReference XValue: VariableName=[Root].WaterTensionFactor
            LinearInterpolationFunction TemperatureEffect
              XYPairs: X=[0, 12, 14]; Y=[0, 1, 1]
              VariableReference XValue: VariableName=[Phenology].MeanTemp
            LinearInterpolationFunction NitrogenStressFactor
              XYPairs: X=[0, 0.5, 1]; Y=[0.1, 0.1, 1]
              VariableReference XValue: VariableName=[Oats].Leaf.Fn
          MultiplyFunction MaxArea
            Constant AreaLargestLeaves: FixedValue=4000; Units=mm^2
              Memo
                Default as per NZ Lincoln data set. Amended between varieties due to large variation in Oats plant type.
            LinearInterpolationFunction AgeFactor
              XYPairs: X=[3, 3.45, 4]; Y=[0.1, 0.5, 1]
              VariableReference XValue: VariableName=[Phenology].Stage
          MultiplyFunction GrowthDuration
            Constant Multiplier: FixedValue=1.75
            VariableReference Phyllochron: VariableName=[Structure].Phyllochron
            LinearInterpolationFunction AgeFactor
              XYPairs: X=[3, 4, 5]; Y=[1, 1, 1]
              VariableReference XValue: VariableName=[Phenology].Stage
          MultiplyFunction LagDuration
            LinearInterpolationFunction AgeFactor
              XYPairs: X=[3, 4, 5]; Y=[0.4, 1, 1]
              VariableReference XValue: VariableName=[Phenology].Stage
            SubtractFunction LastLeafDuration
              AddFunction ThermalTimeToRipe
                VariableReference EarlyReproductive: VariableName=[Phenology].EarlyReproductive.Target
                VariableReference GrainDevelopment: VariableName=[Phenology].GrainDevelopment.Target
                VariableReference GrainFilling: VariableName=[Phenology].GrainFilling.Target
                VariableReference Maturing: VariableName=[Phenology].Maturing.Target
                VariableReference Ripening: VariableName=[Phenology].Ripening.Target
              VariableReference SenescenceDuration: VariableName=[Leaf].CohortParameters.SenescenceDuration
          MultiplyFunction SenescenceDuration
            Constant Multiplier: FixedValue=6
            VariableReference Phyllochron: VariableName=[Structure].Phyllochron
          Constant DetachmentLagDuration: FixedValue=1000000
          Constant DetachmentDuration: FixedValue=1000000
          Constant RelativeBranchLeafSize: FixedValue=1
          LinearInterpolationFunction MaximumNConc
            XYPairs: X=[3, 4, 6]; Y=[0.08, 0.05, 0.02]
            VariableReference XValue: VariableName=[Phenology].Stage
          MultiplyFunction CriticalNConc
            LinearInterpolationFunction CriticalNConcAt350ppm
              XYPairs: X=[3, 4, 6]; Y=[0.07, 0.04, 0.015]
              VariableReference XValue: VariableName=[Phenology].Stage
            LinearInterpolationFunction CO2Factor
              XYPairs: X=[350, 700]; Y=[1, 0.93]
              VariableReference XValue: VariableName=[Weather].CO2
          LinearInterpolationFunction MinimumNConc
            XYPairs: X=[3, 4, 6]; Y=[0.01, 0.005, 0.005]
            VariableReference XValue: VariableName=[Phenology].Stage
          AddFunction DroughtInducedLagAcceleration
            Constant One: FixedValue=1
            MultiplyFunction Stress
              Constant StressResponseCoefficient: FixedValue=1
              LinearInterpolationFunction StressFactor
                XYPairs: X=[0, 0.5]; Y=[0.5, 0]
                VariableReference XValue: VariableName=[Oats].Leaf.Fw
          AddFunction DroughtInducedSenAcceleration: same as Replacements.Oats.Leaf.CohortParameters.DroughtInducedLagAcceleration
          LinearInterpolationFunction SpecificLeafAreaMax
            XYPairs: X=[2, 3, 4]; Y=[25000, 30000, 40000]
            Memo
              Initial SLA is determined as the average of max and min SLA
            VariableReference XValue: VariableName=[Phenology].Stage
          LinearInterpolationFunction SpecificLeafAreaMin
            XYPairs: X=[0.4, 1]; Y=[10000, 18000]
            VariableReference XValue: VariableName=[Leaf].Fn
          Constant InitialNConc: FixedValue=0
          Constant StructuralFraction: FixedValue=0.3
          Constant StorageFraction: FixedValue=0
          Constant LeafSizeShapeParameter: FixedValue=0.3
          Constant SenessingLeafRelativeSize: FixedValue=1; Units=0-1
          MultiplyFunction ShadeInducedSenescenceRate
            LinearInterpolationFunction CoverEffect
              XYPairs: X=[0, 0.9, 0.95, 1]; Y=[0, 0, 0.01, 0.03]
              VariableReference XValue: VariableName=[Leaf].CohortCurrentRankCoverAbove
            VariableReference ThermalTime: VariableName=[Phenology].ThermalTime
          ArrayFunction LagDurationAgeMultiplier: Values=1 1 1
          ArrayFunction SenescenceDurationAgeMultiplier: Values=1 1 1
          ArrayFunction LeafSizeAgeMultiplier: Values=1 1 1 1 1 1 1 1 1 1 1 1
          Constant RemobilisationCost: FixedValue=0
          Constant CarbonConcentration: FixedValue=0.4
        RUEModel Photosynthesis
          Constant RUE: FixedValue=1.6
            Memo
              WHOLE PLANT RUE = bigger than RUE calculated using above ground biomass.
              1.35 measured for Oats at Gatton 2007 (Above ground biomass only) so assume 20% more for root biomass.
          WeightedTemperatureFunction FT: MaximumTemperatureWeighting=0.75
            XYPairs: X=[0, 15, 25, 35]; Y=[0, 1, 1, 0]
          LinearInterpolationFunction FN
            XYPairs: X=[0, 1, 1.5]; Y=[0, 1, 1]
            VariableReference XValue: VariableName=[Leaf].Fn
          LinearInterpolationFunction FW
            XYPairs: X=[0, 0.5, 1]; Y=[0, 1, 1]
            VariableReference XValue: VariableName=[Leaf].Fw
          LinearInterpolationFunction FVPD
            XYPairs: X=[0, 10, 40]; Y=[1, 1, 0]
            VariableReference XValue: VariableName=[Photosynthesis].VPD
          RUECO2Function FCO2: PhotosyntheticPathway=C3
          VariableReference RadnInt: VariableName=[Leaf].RadIntTot
        Constant FrostFraction: FixedValue=0
        VariableReference ThermalTime: VariableName=[Phenology].ThermalTime
        MinimumFunction FRGRFunction
          VariableReference RUE_FT: VariableName=[Leaf].Photosynthesis.FT
          MinimumFunction Others
            VariableReference RUE_FN: VariableName=[Leaf].Photosynthesis.FN
            VariableReference RUE_FVPD: VariableName=[Leaf].Photosynthesis.FVPD
        BiomassRemoval BiomassRemovalDefaults
          Memo
            Prune, graze and thin have been set to zero as they will vary depending on the needs of the user, and they can be overwritten in the manager script.
          OrganBiomassRemovalType Harvest: FractionLiveToRemove=0; FractionDeadToRemove=0; FractionLiveToResidue=0.8; FractionDeadToResidue=0.8
          OrganBiomassRemovalType Cut: FractionLiveToRemove=0.8; FractionDeadToRemove=0.5; FractionLiveToResidue=0.1; FractionDeadToResidue=0.1
          OrganBiomassRemovalType Prune: FractionLiveToRemove=0; FractionDeadToRemove=0; FractionLiveToResidue=0; FractionDeadToResidue=0
          OrganBiomassRemovalType Graze: FractionLiveToRemove=0; FractionDeadToRemove=0; FractionLiveToResidue=0; FractionDeadToResidue=0
          OrganBiomassRemovalType Thin: FractionLiveToRemove=0; FractionDeadToRemove=0; FractionLiveToResidue=0; FractionDeadToResidue=0
        Constant ExtinctionCoeff: FixedValue=0.45
          Memo
            Using extinction coefficient as per measured at Gatton in 2007 (0.45).
        Constant StructuralFraction: FixedValue=0.5
        Constant DMConversionEfficiency: FixedValue=1
        Constant remobilisationCost: FixedValue=0
        Constant CarbonConcentration: FixedValue=0.4
        Constant WidthFunction: FixedValue=0
        VariableReference DepthFunction: VariableName=[Leaf].Height
      GenericOrgan Stem: IsAboveGround=true
        MultiplyFunction SenescenceRate
          LinearInterpolationFunction SenescenceRate
            XYPairs: X=[3, 7, 8, 9]; Y=[0, 0, 0.2, 0.5]
            VariableReference XValue: VariableName=[Phenology].Stage
        LinearInterpolationFunction MaximumNConc
          XYPairs: X=[3, 4, 4.5, 6]; Y=[0.05, 0.04, 0.015, 0.012]
          VariableReference XValue: VariableName=[Phenology].Stage
        Constant MinimumNConc: FixedValue=0.0018
        PhaseBasedSwitch NitrogenDemandSwitch: Start=Emergence; End=StartGrainFill
        Constant NReallocationFactor: FixedValue=0
        PhaseLookup NRetranslocationFactor
          PhaseLookupValue VegetativeGrowth: Start=Sowing; End=Flowering
            Constant Fraction: FixedValue=0
          PhaseLookupValue ReproductiveGrowth: Start=Flowering; End=HarvestRipe
            Constant Fraction: FixedValue=0.5
        PhaseLookup DMRetranslocationFactor
          PhaseLookupValue VegetativeGrowth: Start=Emergence; End=StartGrainFill
            Constant DMRetranslocationFactor: FixedValue=0
          PhaseLookupValue ReproductiveGrowth: Start=StartGrainFill; End=EndGrainFill
            Constant DMRetranslocationFactor: FixedValue=0
        BiomassRemoval BiomassRemovalDefaults
          Memo
            Prune, graze and thin have been set to zero as they will vary depending on the needs of the user, and they can be overwritten in the manager script.
          OrganBiomassRemovalType Harvest: FractionLiveToRemove=0; FractionDeadToRemove=0; FractionLiveToResidue=0.6; FractionDeadToResidue=0.6
          OrganBiomassRemovalType Cut: FractionLiveToRemove=0.7; FractionDeadToRemove=0.5; FractionLiveToResidue=0.1; FractionDeadToResidue=0.1
          OrganBiomassRemovalType Prune: FractionLiveToRemove=0; FractionDeadToRemove=0; FractionLiveToResidue=0; FractionDeadToResidue=0
          OrganBiomassRemovalType Graze: FractionLiveToRemove=0; FractionDeadToRemove=0; FractionLiveToResidue=0; FractionDeadToResidue=0
          OrganBiomassRemovalType Thin: FractionLiveToRemove=0; FractionDeadToRemove=0; FractionLiveToResidue=0; FractionDeadToResidue=0
        DivideFunction PercentWSC
          VariableReference WSC: VariableName=[Stem].Live.StorageWt
          VariableReference StemWt: VariableName=[Stem].Live.Wt
        Constant DetachmentRateFunction: FixedValue=0; Units=/d
        Constant MaintenanceRespirationFunction: FixedValue=0; Units=0-1
        Constant DMConversionEfficiency: FixedValue=1; Units=0-1
        Constant DMReallocationFactor: FixedValue=0
        VariableReference CriticalNConc: VariableName=[Stem].MinimumNConc
        Constant remobilisationCost: FixedValue=0
        Constant CarbonConcentration: FixedValue=0.4
        BiomassDemand DMDemands
          MultiplyFunction Structural
            PartitionFractionDemandFunction DMDemandFunction
              PhaseLookup PartitionFraction
                PhaseLookupValue PreStemElongation: Start=Emergence; End=TerminalSpikelet
                  Constant StemFraction: FixedValue=0.4
                PhaseLookupValue StemElongation: Start=TerminalSpikelet; End=FlagLeaf
                  Constant StemFraction: FixedValue=0.7
                PhaseLookupValue EarEmergence: Start=FlagLeaf; End=Flowering
                  Constant StemFraction: FixedValue=0.7
            PhaseLookup StructuralFraction
              PhaseLookupValue VegetativeGrowth: Start=Sowing; End=Flowering
                Constant Fraction: FixedValue=0.7
              PhaseLookupValue ReproductiveGrowth: Start=Flowering; End=HarvestRipe
                Constant Fraction: FixedValue=0.5
          Constant Metabolic: FixedValue=0
          StorageDMDemandFunction Storage
            SubtractFunction StorageFraction
              Constant One: FixedValue=1
              VariableReference StructuralFraction: VariableName=[Stem].DMDemands.Structural.StructuralFraction
        BiomassDemand NDemands
          MultiplyFunction Structural
            VariableReference MinNconc: VariableName=[Stem].minimumNconc
            VariableReference PotentialDMAllocation: VariableName=[Stem].potentialDMAllocation.Structural
          MultiplyFunction Metabolic
            SubtractFunction MetabolicNconc
              VariableReference CritNconc: VariableName=[Stem].criticalNConc
              VariableReference MinNconc: VariableName=[Stem].minimumNconc
            VariableReference PotentialDMAllocation: VariableName=[Stem].potentialDMAllocation.Structural
          StorageNDemandFunction Storage
            VariableReference NitrogenDemandSwitch: VariableName=[Stem].nitrogenDemandSwitch
            VariableReference MaxNconc: VariableName=[Stem].maximumNconc
        RetranslocateNonStructural RetranslocateNitrogen
        BiomassDemand InitialWt
          Constant Structural: FixedValue=0; Units=g/m^2
          Constant Metabolic: FixedValue=0
          Constant Storage: FixedValue=0
      Root: GrowthRespiration=0; MaintenanceRespiration=0
        RootShapeCylindre RootShape
        Constant KLModifier: FixedValue=1
        Constant SoilWaterEffect: FixedValue=1
        Constant MaxDailyNUptake: FixedValue=20
        Constant SenescenceRate: FixedValue=0.005
        Constant MaximumRootDepth: FixedValue=1000000
        Constant MaximumNConc: FixedValue=0.01
        Constant MinimumNConc: FixedValue=0.01
        PhaseBasedSwitch NitrogenDemandSwitch: Start=Germination; End=Maturity
        BiomassRemoval BiomassRemovalDefaults
          Memo
            Prune, graze and thin have been set to zero as they will vary depending on the needs of the user, and they can be overwritten in the manager script.
          OrganBiomassRemovalType Harvest: FractionLiveToRemove=0; FractionDeadToRemove=0; FractionLiveToResidue=1; FractionDeadToResidue=1
          OrganBiomassRemovalType Cut: FractionLiveToRemove=0; FractionDeadToRemove=0; FractionLiveToResidue=0.5; FractionDeadToResidue=0.5
          OrganBiomassRemovalType Prune: FractionLiveToRemove=0; FractionDeadToRemove=0; FractionLiveToResidue=0; FractionDeadToResidue=0
          OrganBiomassRemovalType Graze: FractionLiveToRemove=0; FractionDeadToRemove=0; FractionLiveToResidue=0; FractionDeadToResidue=0
          OrganBiomassRemovalType Thin: FractionLiveToRemove=0; FractionDeadToRemove=0; FractionLiveToResidue=0; FractionDeadToResidue=0
        Constant KNO3: FixedValue=0.02
        Constant KNH4: FixedValue=0.01
        Constant SpecificRootLength: FixedValue=105; Units=m/g
        MultiplyFunction RootFrontVelocity
          PhaseLookup PotentialRootFrontVelocity
            PhaseLookupValue PreEmergence: Start=Germination; End=Emergence
              Constant Value: FixedValue=5; Units=mm/d
            PhaseLookupValue PostEmergence: Start=Emergence; End=Maturity
              Constant Value: FixedValue=20; Units=mm/d
          WeightedTemperatureFunction TemperatureFactor: MaximumTemperatureWeighting=0.5
            XYPairs: X=[0, 15, 25, 35]; Y=[0, 1, 1, 0]
          LinearInterpolationFunction WaterFactor
            SoilWaterScale
            XYPairs: X=[0, 0.25, 1]; Y=[0, 1, 1]
            VariableReference XValue: VariableName=[SoilWaterScale]
        LinearInterpolationFunction NUptakeSWFactor
          SoilWaterScale
          XYPairs: X=[0, 1]; Y=[0, 1]
          Memo
            This is modelled in the same way as the old wheat model where potential N uptake is decreased as the soil dries as described by NUptakeSWFactor
          VariableReference XValue: VariableName=[SoilWaterScale]
        Constant DMConversionEfficiency: FixedValue=1
        Constant MaintenanceRespirationFunction: FixedValue=1
        Constant remobilisationCost: FixedValue=0
        Constant CarbonConcentration: FixedValue=0.4
        BiomassDemand DMDemands
          MultiplyFunction Structural
            PartitionFractionDemandFunction DMDemandFunction
              PhaseLookup PartitionFraction
                PhaseLookupValue PreEmergence: Start=Germination; End=Emergence
                  Constant Value: FixedValue=0
                PhaseLookupValue PreFlowering: Start=Emergence; End=Flowering
                  LinearInterpolationFunction AgeFactor
                    XYPairs: X=[3, 4]; Y=[0.5, 0.2]
                    VariableReference XValue: VariableName=[Phenology].Stage
                PhaseLookupValue PostFlowering: Start=Flowering; End=EndGrainFill
                  Constant Value: FixedValue=0.2
            Constant StructuralFraction: FixedValue=1
          Constant Metabolic: FixedValue=0
          StorageDMDemandFunction Storage
            SubtractFunction StorageFraction
              Constant One: FixedValue=1
              VariableReference StructuralFraction: VariableName=[Root].DMDemands.Structural.StructuralFraction
        BiomassDemand NDemands
          MultiplyFunction Structural
            VariableReference MinNconc: VariableName=[Root].minimumNconc
            VariableReference PotentialDMAllocation: VariableName=[Root].potentialDMAllocation.Structural
          MultiplyFunction Metabolic
            SubtractFunction MetabolicNconc
              VariableReference CritNconc: VariableName=[Root].criticalNConc
              VariableReference MinNconc: VariableName=[Root].minimumNconc
            VariableReference PotentialDMAllocation: VariableName=[Root].potentialDMAllocation.Structural
          StorageNDemandFunction Storage
            VariableReference NitrogenDemandSwitch: VariableName=[Root].nitrogenDemandSwitch
            VariableReference MaxNconc: VariableName=[Root].maximumNconc
        VariableReference CriticalNConc: VariableName=[Root].MinimumNConc
        BiomassDemand InitialWt
          Constant Structural: FixedValue=0.005; Units=g/plant
          Constant Metabolic: FixedValue=0
          Constant Storage: FixedValue=0
        Constant RootDepthStressFactor: FixedValue=1
      GenericOrgan Panicle: IsAboveGround=true
        Constant NReallocationFactor: FixedValue=0
        Constant NRetranslocationFactor: FixedValue=0.3
        Constant MaximumNConc: FixedValue=0.025
        Constant SenescenceRate: FixedValue=0; Units=/d
        Constant MinimumNConc: FixedValue=0.02
        BiomassRemoval BiomassRemovalDefaults
          Memo
            Prune, graze and thin have been set to zero as they will vary depending on the needs of the user, and they can be overwritten in the manager script.
          OrganBiomassRemovalType Harvest: FractionLiveToRemove=0; FractionDeadToRemove=0; FractionLiveToResidue=1; FractionDeadToResidue=1
          OrganBiomassRemovalType Cut: FractionLiveToRemove=1; FractionDeadToRemove=1; FractionLiveToResidue=0; FractionDeadToResidue=0
          OrganBiomassRemovalType Prune: FractionLiveToRemove=0; FractionDeadToRemove=0; FractionLiveToResidue=0; FractionDeadToResidue=0
          OrganBiomassRemovalType Graze: FractionLiveToRemove=0; FractionDeadToRemove=0; FractionLiveToResidue=0; FractionDeadToResidue=0
          OrganBiomassRemovalType Thin: FractionLiveToRemove=0; FractionDeadToRemove=0; FractionLiveToResidue=0; FractionDeadToResidue=0
        PhaseBasedSwitch NitrogenDemandSwitch: Start=Emergence; End=StartGrainFill
        PhaseLookup DMRetranslocationFactor
          PhaseLookupValue VegetativeGrowth: Start=Emergence; End=StartGrainFill
            Constant DMRetranslocationFactor: FixedValue=0
          PhaseLookupValue ReproductiveGrowth: Start=StartGrainFill; End=EndGrainFill
            Constant DMRetranslocationFactor: FixedValue=0.5
        Constant DetachmentRateFunction: FixedValue=0; Units=/d
        Constant MaintenanceRespirationFunction: FixedValue=0; Units=0-1
        Constant DMConversionEfficiency: FixedValue=1; Units=0-1
        MultiplyFunction HeadNumber
          VariableReference StemNumber: VariableName=[Structure].TotalStemPopn
          Constant PaniclesPerStem: FixedValue=0.83; Units=0-1
        Constant DMReallocationFactor: FixedValue=0
        VariableReference CriticalNConc: VariableName=[Panicle].MinimumNConc
        Constant remobilisationCost: FixedValue=0
        Constant CarbonConcentration: FixedValue=0.4
        BiomassDemand DMDemands
          MultiplyFunction Structural
            PopulationBasedDemandFunction DMDemandFunction
              VariableReference ThermalTime: VariableName=[Phenology].ThermalTime
              MinimumFunction ExpansionStress: same as Replacements.Oats.Leaf.CohortParameters.ExpansionStress
              VariableReference OrganPopulation: VariableName=[Panicle].HeadNumber
              Constant StartStage: FixedValue=4.8
              Constant MaximumOrganWt: FixedValue=0.4; Units=g
              AddFunction GrowthDuration
                VariableReference EarlyReproductive: VariableName=[Phenology].EarlyReproductive.Target
                VariableReference GrainDevelopment: VariableName=[Phenology].GrainDevelopment.Target
            Constant StructuralFraction: FixedValue=0.9
          Constant Metabolic: FixedValue=0
          StorageDMDemandFunction Storage
            SubtractFunction StorageFraction
              Constant One: FixedValue=1
              VariableReference StructuralFraction: VariableName=[Panicle].DMDemands.Structural.StructuralFraction
        BiomassDemand NDemands
          MultiplyFunction Structural
            VariableReference MinNconc: VariableName=[Panicle].minimumNconc
            VariableReference PotentialDMAllocation: VariableName=[Panicle].potentialDMAllocation.Structural
          MultiplyFunction Metabolic
            SubtractFunction MetabolicNconc
              VariableReference CritNconc: VariableName=[Panicle].criticalNConc
              VariableReference MinNconc: VariableName=[Panicle].minimumNconc
            VariableReference PotentialDMAllocation: VariableName=[Panicle].potentialDMAllocation.Structural
          StorageNDemandFunction Storage
            VariableReference NitrogenDemandSwitch: VariableName=[Panicle].nitrogenDemandSwitch
            VariableReference MaxNconc: VariableName=[Panicle].maximumNconc
        RetranslocateNonStructural RetranslocateNitrogen
        BiomassDemand InitialWt
          Constant Structural: FixedValue=0; Units=g/m^2
          Constant Metabolic: FixedValue=0
          Constant Storage: FixedValue=0
      CompositeBiomass AboveGround: DMDOfStructural=0.6
        Propertys=[[Leaf].Live, [Leaf].Dead, [Stem].Live, [Stem].Dead, [Panicle].Live, [Panicle].Dead, [Grain].Live, [Grain].Dead]
      CompositeBiomass AboveGroundLive: Propertys=[[Leaf].Live, [Stem].Live, [Panicle].Live, [Grain].Live]; DMDOfStructural=0.6
      CompositeBiomass AboveGroundDead: Propertys=[[Leaf].Dead, [Stem].Dead, [Panicle].Dead, [Grain].Dead]; DMDOfStructural=0.6
      CompositeBiomass BelowGround: Propertys=[[Root].Live, [Root].Dead]; DMDOfStructural=0.6
      CompositeBiomass Total: DMDOfStructural=0.6
        Propertys=[[Leaf].Live, [Leaf].Dead, [Stem].Live, [Stem].Dead, [Root].Live, [Root].Dead, [Panicle].Live, [Panicle].Dead, [Grain].Live, [Grain].Dead]
      CompositeBiomass TotalLive: DMDOfStructural=0.6
        Propertys=[[Leaf].Live, [Stem].Live, [Root].Live, [Panicle].Live, [Grain].Live]
      CompositeBiomass TotalDead: DMDOfStructural=0.6
        Propertys=[[Leaf].Dead, [Stem].Dead, [Root].Dead, [Panicle].Dead, [Grain].Dead]
      CompositeBiomass Ear: DMDOfStructural=0.6
        Propertys=[[Panicle].Live, [Grain].Live, [Panicle].Dead, [Grain].Dead]
        Memo
          The Ear composite biomass object includes the Live and dead pools of all organs within the Ear to allow output for total dry matter and Nutrient contents, including total structural, non-structural and metabolic pools.
      CompositeBiomass StemPlusPanicle: Propertys=[[Stem].Live, [Panicle].Live, [Stem].Dead, [Panicle].Dead]; DMDOfStructural=0.6
      CultivarFolder Cultivars
        Memo
          Most crop parameters can be specified individually for cultivars. Customized cultivar parameters are reported in this section.
        Cultivar Aladdin
          Command:
            [Phenology].MinimumLeafNumber.FixedValue = 9
            [Phenology].VrnSensitivity.FixedValue = 10
            [Phenology].PpSensitivity.FixedValue = 7.5
            [Phenology].EarlyReproductivePpSensitivity.FixedValue = 3
            [Phenology].EarlyReproductiveLongDayBase.FixedValue = 3
            [Structure].Phyllochron.BasePhyllochron.FixedValue = 90
            [Leaf].CohortParameters.MaxArea.AreaLargestLeaves.FixedValue = 8000
        Cultivar Algerian
          Command:
            [Phenology].MinimumLeafNumber.FixedValue = 9
            [Phenology].VrnSensitivity.FixedValue = 12
            [Phenology].PpSensitivity.FixedValue = 6
            [Phenology].EarlyReproductivePpSensitivity.FixedValue = 4
            [Phenology].EarlyReproductiveLongDayBase.FixedValue = 3
            [Structure].Phyllochron.BasePhyllochron.FixedValue = 105
            [Leaf].CohortParameters.MaxArea.AreaLargestLeaves.FixedValue = 5000
            [Structure].BranchingRate.StressFactors.CoverEffect.XYPairs.X = 0,0.4,0.7
        Cultivar Bond: same as Replacements.Oats.Cultivars.Aladdin
        Cultivar Brusher
          Command:
            [Phenology].MinimumLeafNumber.FixedValue = 7
            [Phenology].VrnSensitivity.FixedValue = 1
            [Phenology].PpSensitivity.FixedValue = 1
            [Phenology].EarlyReproductivePpSensitivity.FixedValue = 0
            [Phenology].EarlyReproductiveLongDayBase.FixedValue = 2
            [Structure].Phyllochron.BasePhyllochron.FixedValue = 80
        Cultivar Comet: same as Replacements.Oats.Cultivars.Aladdin
        Cultivar Coolibah
          Command:
            [Phenology].MinimumLeafNumber.FixedValue = 9
            [Phenology].VrnSensitivity.FixedValue = 5.3
            [Phenology].PpSensitivity.FixedValue = 3.0
            [Structure].Phyllochron.BasePhyllochron.FixedValue = 90
            [Leaf].CohortParameters.MaxArea.AreaLargestLeaves.FixedValue = 5000
            [Phenology].EarlyReproductivePpSensitivity.FixedValue = 0
            [Phenology].EarlyReproductiveLongDayBase.FixedValue = 2
            [Structure].BranchingRate.StressFactors.CoverEffect.XYPairs.X = 0,0.25,0.5
          Memo
            Leaf appearance rate calibrated using data from Gatton 2007 for Taipan and Coolibah
        Cultivar Drover
          Command:
            [Phenology].MinimumLeafNumber.FixedValue = 9
            [Phenology].VrnSensitivity.FixedValue = 4
            [Phenology].PpSensitivity.FixedValue = 9
            [Phenology].EarlyReproductivePpSensitivity.FixedValue = 6
            [Phenology].EarlyReproductiveLongDayBase.FixedValue = 3
            [Structure].Phyllochron.BasePhyllochron.FixedValue = 80
            [Leaf].CohortParameters.MaxArea.AreaLargestLeaves.FixedValue = 8000
        Cultivar Drummond
          Command:
            [Phenology].MinimumLeafNumber.FixedValue = 8.5
            [Phenology].VrnSensitivity.FixedValue = 7
            [Phenology].PpSensitivity.FixedValue = 3
            [Phenology].EarlyReproductiveLongDayBase.FixedValue = 3
            [Phenology].EarlyReproductivePpSensitivity.FixedValue = 2
            [Structure].Phyllochron.BasePhyllochron.FixedValue = 75
            [Structure].BranchingRate.StressFactors.CoverEffect.XYPairs.X = 0,0.2,0.35
            [Leaf].CohortParameters.MaxArea.AreaLargestLeaves.FixedValue = 4000
            [Structure].BranchingRate.PotentialBranchingRate.Vegetative.PotentialBranchingRate.XYPairs.X = 1,2,3.99,4,5,6,7,8,9
            [Structure].BranchingRate.PotentialBranchingRate.Vegetative.PotentialBranchingRate.XYPairs.Y = 0,0,0,1,2,4,7,12,20
            [Leaf].CohortParameters.GrowthDuration.AgeFactor.XYPairs.Y = 1,1,0.1
            [Grain].MaximumPotentialGrainSize.FixedValue = 0.05
            [Grain].NumberFunction.GrainNumber.GrainsPerGramOfStem.FixedValue = 40
        Cultivar Drummond_orig
          Command:
            [Phenology].MinimumLeafNumber.FixedValue = 9
            [Phenology].VrnSensitivity.FixedValue = 0
            [Phenology].PpSensitivity.FixedValue = 10
            [Structure].Phyllochron.BasePhyllochron.FixedValue = 80
            [Structure].BranchingRate.StressFactors.CoverEffect.XYPairs.X = 0,0.2,0.35
            [Leaf].CohortParameters.MaxArea.AreaLargestLeaves.FixedValue = 4000
            [Structure].BranchingRate.PotentialBranchingRate.Vegetative.PotentialBranchingRate.XYPairs.X = 1,2,3.99,4,5,6,7,8,9
        Cultivar Genie: same as Replacements.Oats.Cultivars.Aladdin
        Cultivar Kangaroo
          Command:
            [Phenology].MinimumLeafNumber.FixedValue = 7
            [Phenology].VrnSensitivity.FixedValue = 4
            [Phenology].PpSensitivity.FixedValue = 4
            [Phenology].EarlyReproductivePpSensitivity.FixedValue = 0
            [Phenology].EarlyReproductiveLongDayBase.FixedValue = 2
            [Structure].Phyllochron.BasePhyllochron.FixedValue = 90
        Cultivar Hokonui
          Command:
            [Phenology].MinimumLeafNumber.FixedValue = 9
            [Phenology].VrnSensitivity.FixedValue = 0
            [Phenology].PpSensitivity.FixedValue = 10
            [Structure].Phyllochron.BasePhyllochron.FixedValue = 90
            [Leaf].CohortParameters.GrowthDuration.AgeFactor.XYPairs.Y = 1,1,0.1
        Cultivar Milton
          Command:
            [Phenology].MinimumLeafNumber.FixedValue = 8.5
            [Phenology].VrnSensitivity.FixedValue = 7
            [Phenology].PpSensitivity.FixedValue = 3
            [Phenology].EarlyReproductiveLongDayBase.FixedValue = 2
            [Phenology].EarlyReproductivePpSensitivity.FixedValue = 0
            [Structure].Phyllochron.BasePhyllochron.FixedValue = 105
            [Leaf].CohortParameters.MaxArea.AreaLargestLeaves.FixedValue = 4000
            [Leaf].CohortParameters.SenescenceDuration.Multiplier.FixedValue = 3
            [Leaf].CohortParameters.GrowthDuration.AgeFactor.XYPairs.Y = 1,1,0.1
            [Grain].MaximumPotentialGrainSize.FixedValue = 0.05
            [Grain].NumberFunction.GrainNumber.GrainsPerGramOfStem.FixedValue = 50
            [Leaf].ExtinctionCoeff.FixedValue = 0.6
        Cultivar Nugene: same as Replacements.Oats.Cultivars.Aladdin
        Cultivar Stampede
          Command:
            [Phenology].MinimumLeafNumber.FixedValue = 9
            [Phenology].VrnSensitivity.FixedValue = 0
            [Phenology].PpSensitivity.FixedValue = 10
            [Structure].Phyllochron.BasePhyllochron.FixedValue = 80
            [Leaf].CohortParameters.GrowthDuration.AgeFactor.XYPairs.Y = 1,1,0.1
        Cultivar Taipan
          Command:
            [Phenology].MinimumLeafNumber.FixedValue = 9
            [Phenology].VrnSensitivity.FixedValue = 10
            [Phenology].PpSensitivity.FixedValue = 7.5
            [Phenology].EarlyReproductivePpSensitivity.FixedValue = 3
            [Phenology].EarlyReproductiveLongDayBase.FixedValue = 3
            [Structure].Phyllochron.BasePhyllochron.FixedValue = 90
            [Leaf].CohortParameters.MaxArea.AreaLargestLeaves.FixedValue = 8000
          Memo
            Leaf appearance rate calibrated using data from Gatton 2007 for Taipan and Coolibah
        Cultivar Wintaroo
          Command:
            [Phenology].MinimumLeafNumber.FixedValue = 7
            [Phenology].VrnSensitivity.FixedValue = 2
            [Phenology].PpSensitivity.FixedValue = 2
            [Phenology].EarlyReproductivePpSensitivity.FixedValue = 0
            [Phenology].EarlyReproductiveLongDayBase.FixedValue = 2
            [Structure].Phyllochron.BasePhyllochron.FixedValue = 90
        Cultivar Wizard: same as Replacements.Oats.Cultivars.Aladdin
        Cultivar Iapar61Ibipora
          Command:
            [Phenology].MinimumLeafNumber.FixedValue = 9
            [Phenology].VrnSensitivity.FixedValue = 13
            [Phenology].VernLag.FixedValue = 2
            [Phenology].PpSensitivity.FixedValue = 6
            [Phenology].EarlyReproductivePpSensitivity.FixedValue = 2
            [Structure].BranchingRate.PotentialBranchingRate.Vegetative.PotentialBranchingRate.XYPairs.Y = 0,0,0.8,0.5,0.5,0.2,0,0
            [Structure].BranchingRate.StressFactors.CoverEffect.XYPairs.X = 0,0.4,0.7
            [Grain].MaximumPotentialGrainSize.FixedValue = 0.015
            [Leaf].CohortParameters.GrowthDuration.Multiplier.FixedValue = 4
            [Leaf].CohortParameters.MaxArea.AreaLargestLeaves.FixedValue = 5000
            [Leaf].CohortParameters.SpecificLeafAreaMax.XYPairs.X = 2,3.05,3.1,4,6,7,8
            [Leaf].CohortParameters.SpecificLeafAreaMax.XYPairs.Y = 100,3200,45000,25000,12000,8000,6000
            [Leaf].CohortParameters.SpecificLeafAreaMin.XYPairs.Y = 6000,6000
            [Root].DMDemands.Structural.DMDemandFunction.PartitionFraction.PreFlowering.AgeFactor.XYPairs.Y = 0.2,0.2
            [Panicle].DMDemands.Structural.DMDemandFunction.MaximumOrganWt.FixedValue = 0.17
          Memo
            'Iapar 61 Ibiporã' is a cultivar of Black Oat (Avena strigosa Schreb) used for forage purposes. Its calibration was performed using data from an experiment under cutting management in Piracicaba, SP, Brazil.
      Constant MortalityRate: FixedValue=0
  DataStore
    ExcelInput ObservedPred: SheetNames=[ObservedProd, ObservedSoilWater, Observedheight]
      FileNames=[C:\Users\debor\Desktop\Modelagem\Aveia Preta\ObservedOatsPiracicaba_2018-2019.xlsx]
    PredictedObserved: PredictedTableName=Report; ObservedTableName=ObservedProd; FieldNameUsedForMatch=Clock.Today; AllColumns=false
    PredictedObserved PredictedObservedSW: PredictedTableName=Report; ObservedTableName=ObservedSoilWater; FieldNameUsedForMatch=Clock.Today; AllColumns=false
    PredictedObserved PredictedObservedH: PredictedTableName=Report; ObservedTableName=ObservedHeight; FieldNameUsedForMatch=Clock.Today; AllColumns=false
  Experiment Piracicaba
    Factors
      Factor Irr: Specification=[IrrigationSchedule]
        Operations Rainfed
          2018-04-25  [Irrigation].Apply(8.0);
          2018-04-28  [Irrigation].Apply(6.0);
          2018-04-29  [Irrigation].Apply(6.0);
          2018-04-30  [Irrigation].Apply(2.0);
          2018-05-01  [Irrigation].Apply(2.0);
          2018-05-03  [Irrigation].Apply(2.0);
          2018-05-05  [Irrigation].Apply(1.0);
          2018-05-09  [Irrigation].Apply(4.0);
          2018-06-14  [CuttingManagement].Script.DoCut(3.05, 30.4, 0, 0);
          2018-07-16  [CuttingManagement].Script.DoCut(5.12, 51.1, 0, 0);
          2018-08-17  [CuttingManagement].Script.DoCut(8.86, 44.4, 0, 0);
          2018-09-18  [CuttingManagement].Script.DoCut(12.61, 37.6, 0, 0);
          2018-10-18  [CuttingManagement].Script.DoCut(16.12, 31.2, 0, 0);
          2018-11-18  [CuttingManagement].Script.DoCut(0, 0.08, 0, 0);
          2019-04-24  [Irrigation].Apply(16);
          2019-04-27  [Irrigation].Apply(16);
          2019-04-28  [Irrigation].Apply(8);
          2019-05-01  [Irrigation].Apply(5.8);
          2019-05-04  [Irrigation].Apply(8.7);
          2019-05-08  [Irrigation].Apply(4.4);
          2019-05-10  [Irrigation].Apply(11.6);
          2019-05-13  [Irrigation].Apply(4.4);
          2019-05-16  [Irrigation].Apply(4.4);
          2019-05-23  [Irrigation].Apply(2.9);
          2019-07-22  [Irrigation].Apply(2.0);
          2019-06-13  [CuttingManagement].Script.DoCut(2.63, 21.85, 0, 0);
          2019-07-18  [CuttingManagement].Script.DoCut(4.58, 38.12, 0, 0);
          2019-08-19  [CuttingManagement].Script.DoCut(2.17, 55.68, 0, 0);
          2019-09-24  [CuttingManagement].Script.DoCut(3.71, 44.82, 0, 0);
          2019-10-24  [CuttingManagement].Script.DoCut(4.71, 19.18, 0, 0);
          2019-11-01  [CuttingManagement].Script.DoCut(2.13, 2.88, 0, 0);
        Operations Wet
          2018-04-25  [Irrigation].Apply(20);
          2018-04-28  [Irrigation].Apply(15);
          2018-04-29  [Irrigation].Apply(15);
          2018-04-30  [Irrigation].Apply(4.0);
          2018-05-01  [Irrigation].Apply(4.0);
          2018-05-03  [Irrigation].Apply(3.0);
          2018-05-05  [Irrigation].Apply(2.0);
          2018-05-09  [Irrigation].Apply(17.9);
          2018-05-11  [Irrigation].Apply(6.0);
          2018-05-17  [Irrigation].Apply(1.6);
          2018-05-24  [Irrigation].Apply(2.0);
          2018-05-29  [Irrigation].Apply(2.0);
          2018-06-04  [Irrigation].Apply(7.9);
          2018-06-08  [Irrigation].Apply(4.0);
          2018-06-12  [Irrigation].Apply(7.3);
          2018-06-15  [Irrigation].Apply(4.0);
          2018-06-18  [Irrigation].Apply(9.9);
          2018-06-22  [Irrigation].Apply(4.0);
          2018-06-26  [Irrigation].Apply(12.9);
          2018-06-29  [Irrigation].Apply(3.0);
          2018-07-04  [Irrigation].Apply(17.9);
          2018-07-06  [Irrigation].Apply(7.9);
          2018-07-09  [Irrigation].Apply(11.9);
          2018-07-12  [Irrigation].Apply(9.9);
          2018-07-16  [Irrigation].Apply(9.1);
          2018-07-20  [Irrigation].Apply(5.6);
          2018-07-24  [Irrigation].Apply(11.1);
          2018-07-27  [Irrigation].Apply(11.9);
          2018-07-31  [Irrigation].Apply(11.9);
          2018-08-17  [Irrigation].Apply(4.4);
          2018-08-21  [Irrigation].Apply(8.5);
          2018-08-25  [Irrigation].Apply(1.0);
          2018-08-28  [Irrigation].Apply(5.6);
          2018-09-01  [Irrigation].Apply(13.3);
          2018-09-04  [Irrigation].Apply(6.3);
          2018-09-07  [Irrigation].Apply(13.3);
          2018-09-11  [Irrigation].Apply(15.5);
          2018-09-18  [Irrigation].Apply(7.1);
          2018-09-26  [Irrigation].Apply(5.0);
          2018-09-29  [Irrigation].Apply(8.1);
          2018-10-03  [Irrigation].Apply(12.1);
          2018-10-12  [Irrigation].Apply(3.0);
          2018-10-19  [Irrigation].Apply(1.0);
          2018-06-14  [CuttingManagement].Script.DoCut(0.48, 26.8, 0, 0);
          2018-07-16  [CuttingManagement].Script.DoCut(0.80, 45.1, 0, 0);
          2018-08-17  [CuttingManagement].Script.DoCut(0.75, 37.8, 0, 0);
          2018-09-18  [CuttingManagement].Script.DoCut(0.71, 30.5, 0, 0);
          2018-10-18  [CuttingManagement].Script.DoCut(0.66, 23.7, 0, 0);
          2019-04-24  [Irrigation].Apply(16.0);
          2019-04-27  [Irrigation].Apply(11.6);
          2019-04-28  [Irrigation].Apply(8.7);
          2019-05-01  [Irrigation].Apply(5.8);
          2019-05-04  [Irrigation].Apply(8.7);
          2019-05-08  [Irrigation].Apply(4.4);
          2019-05-10  [Irrigation].Apply(11.6);
          2019-05-13  [Irrigation].Apply(4.4);
          2019-05-16  [Irrigation].Apply(4.4);
          2019-05-23  [Irrigation].Apply(4.4);
          2019-05-26  [Irrigation].Apply(4.4);
          2019-05-29  [Irrigation].Apply(4.7);
          2019-06-01  [Irrigation].Apply(11.1);
          2019-06-07  [Irrigation].Apply(3.8);
          2019-06-10  [Irrigation].Apply(10.5);
          2019-06-13  [Irrigation].Apply(9.9);
          2019-06-16  [Irrigation].Apply(9.0);
          2019-06-19  [Irrigation].Apply(5.8);
          2019-06-22  [Irrigation].Apply(9.6);
          2019-07-25  [Irrigation].Apply(13.7);
          2019-06-28  [Irrigation].Apply(9.6);
          2019-07-01  [Irrigation].Apply(11.1);
          2019-07-13  [Irrigation].Apply(11.9);
          2019-07-16  [Irrigation].Apply(11.1);
          2019-07-19  [Irrigation].Apply(9.9);
          2019-07-22  [Irrigation].Apply(16.6);
          2019-07-25  [Irrigation].Apply(11.1);
          2019-07-28  [Irrigation].Apply(7.9);
          2019-07-31  [Irrigation].Apply(12.8);
          2019-08-02  [Irrigation].Apply(7.9);
          2019-08-05  [Irrigation].Apply(5.5);
          2019-08-08  [Irrigation].Apply(7.3);
          2019-08-11  [Irrigation].Apply(14.3);
          2019-08-14  [Irrigation].Apply(15.1);
          2019-08-17  [Irrigation].Apply(14.3);
          2019-08-20  [Irrigation].Apply(12.5);
          2019-08-23  [Irrigation].Apply(9.9);
          2019-08-26  [Irrigation].Apply(11.9);
          2019-08-29  [Irrigation].Apply(13.4);
          2019-09-07  [Irrigation].Apply(7.6);
          2019-09-10  [Irrigation].Apply(14.0);
          2019-09-13  [Irrigation].Apply(15.1);
          2019-09-16  [Irrigation].Apply(14.8);
          2019-09-18  [Irrigation].Apply(12.5);
          2019-09-21  [Irrigation].Apply(7.9);
          2019-09-23  [Irrigation].Apply(9.9);
          2019-09-27  [Irrigation].Apply(3.5);
          2019-10-02  [Irrigation].Apply(9.6);
          2019-10-05  [Irrigation].Apply(6.7);
          2019-10-09  [Irrigation].Apply(6.7);
          2019-10-13  [Irrigation].Apply(10.5);
          2019-10-15  [Irrigation].Apply(13.4);
          2019-10-18  [Irrigation].Apply(12.2);
          2019-06-13  [CuttingManagement].Script.DoCut(2.1, 36.43, 0, 0);
          2019-07-18  [CuttingManagement].Script.DoCut(3.6, 63.56, 0, 0);
          2019-08-19  [CuttingManagement].Script.DoCut(0.94, 49.47, 0, 0);
          2019-09-24  [CuttingManagement].Script.DoCut(1.48, 48.95, 0, 0);
    Simulation PiracicabaBase
      Clock: Start=2018-04-21; End=2019-11-02
      Weather
        FileName=C:\Users\debor\Desktop\Modelagem\Dados climaticos Piracicaba 19792019.met
      Summary SummaryFile
      SoilArbitrator
      Zone Field: Area=1; Slope=0; AspectAngle=0; Altitude=528
        Soil: SoilType=Oxisol; LocalName=ESALQ Area experimental; Site=Piracicaba; State=São Paulo; Country=Brazil; Latitude=-22.7; Longitude=47.5
          Physical
            Thickness  ParticleSizeClay  ParticleSizeSand  ParticleSizeSilt  BD     AirDry  LL15   DUL    SAT
            100        46.22             33.38             20.43             1.351  0.15    0.164  0.37   0.46
            100        51.07             30.21             18.72             1.43   0.2     0.215  0.355  0.46
            100        54.75             29.77             15.48             1.43   0.24    0.258  0.365  0.46
            100        58.79             25.53             15.68             1.43   0.3     0.31   0.368  0.46
            100        60.88             25.59             13.53             1.404  0.31    0.31   0.375  0.47
            100        61.13             25.69             13.19             1.377  0.32    0.33   0.41   0.47
            100        60.42             28.83             10.7              1.3    0.32    0.33   0.375  0.47
            100        59.64             27.2              13.16             1.31   0.31    0.31   0.33   0.43
            100        59.69             26.63             13.69             1.39   0.29    0.29   0.32   0.42
            600        59.69             26.63             13.69             1.39   0.29    0.29   0.32   0.42
            SoilCrop OatsSoil
              LL=[0.164, 0.215, 0.258, 0.31, 0.31, 0.33, 0.33, 0.31, 0.29, 0.29]
              KL=[0.06, 0.06, 0.06, 0.06, 0.05, 0.025, 0.025, 0.02, 0.02, 0.01]
              XF=[1, 1, 1, 1, 1, 1, 1, 1, 1, 1]
          WaterBalance SoilWater: SummerDate=1-Oct; SummerU=4; SummerCona=2; WinterDate=1-Apr; WinterU=2; WinterCona=1.5; DiffusConst=40; DiffusSlope=16; Salb=0.13; CN2Bare=85; CNRed=10; CNCov=0.8; SWCON=[0.9, 0.9, 0.9, 0.9, 0.9, 0.9, 0.9, 0.9, 0.9, 0.9, -, -]
            Thickness=[100, 100, 100, 100, 100, 100, 100, 100, 100, 100, 999999, 999999]
          SoilNitrogen: fom_types=[default, manure, mucuna, lablab, shemp, stable]; fract_carb=[0.2, 0.3, 0.54, 0.57, 0.45, 0]; fract_cell=[0.7, 0.3, 0.37, 0.37, 0.47, 0.1]; fract_lign=[0.1, 0.4, 0.09, 0.06, 0.08, 0.9]; NPartitionApproach=0
            SoilNitrogenNO3 NO3
            SoilNitrogenNH4 NH4
            SoilNitrogenUrea Urea
            SoilNitrogenPlantAvailableNO3 PlantAvailableNO3
            SoilNitrogenPlantAvailableNH4 PlantAvailableNH4
          Organic: FOMCNRatio=40
            Thickness  Carbon  SoilCNRatio  FBiom  FInert  FOM
            100        1.3     12.5         0.025  0.3     40.5897
            100        1.3     12.5         0.02   0.37    34.9359
            100        0.9     12.5         0.015  0.45    30.0696
            100        0.9     12.5         0.01   0.5     25.8812
            100        0.7     12.5         0.01   0.6     22.2761
            100        0.7     12.5         0.01   0.8     19.1732
            200        0.6     12.5         0.01   0.95    14.2039
            200        0.6     12.5         0.01   0.95    10.5225
            1000       0.6     12.5         0.01   0.95    2.34789
          Chemical
            Thickness  NO3N  NH4N  PH    EC
            200        49    84    5.6   0.3769
            200        46    60    5.86  0.317
            200        60    130   6.35  0.335
            200        53    49    6.92  0.3487
            200        53    49    6.92  0.3487
            500        53    49    6.92  0.3487
          Sample Initial nitrogen: Thickness=[200, 200, 200, 200, 200, 500]; SWUnits=Volumetric; OCUnits=Total; PHUnits=Water
          InitialWater Initial water: PercentMethod=1; FractionFull=0.65
          CERESSoilTemperature
        Folder Oats
        Fertiliser
        SurfaceOrganicMatter: InitialResidueName=wheat_stubble; InitialResidueType=TropicalPasture; InitialResidueMass=500; InitialStandingFraction=0; InitialCPR=0; InitialCNR=100
        MicroClimate: a_interception=0; b_interception=1; c_interception=0; d_interception=0; soil_albedo=0.3; SoilHeatFluxFraction=0.4; MinimumHeightDiffForNewLayer=0; NightInterceptionFraction=0.5; ReferenceHeight=2
        Operations
          2018-04-28  [Oats].Sow(population: 120, cultivar:Iapar61Ibipora , depth: 5, rowSpacing: 170);
          2018-05-18  [Fertiliser].Apply(111.1, Fertiliser.Types.Urea, 5);
          2018-06-15  [Fertiliser].Apply(111.1, Fertiliser.Types.Urea, 5);
          2018-07-17  [Fertiliser].Apply(111.1, Fertiliser.Types.Urea, 5);
          2018-08-18  [Fertiliser].Apply(111.1, Fertiliser.Types.Urea, 5);
          2018-09-19  [Fertiliser].Apply(111.1, Fertiliser.Types.Urea, 5);
          2018-11-20  [Oats].EndCrop();
          2019-04-27  [Oats].Sow(population: 140, cultivar:Iapar61Ibipora , depth: 5, rowSpacing: 170);
          2019-05-16  [Fertiliser].Apply(111.1, Fertiliser.Types.Urea, 5);
          2019-06-16  [Fertiliser].Apply(111.1, Fertiliser.Types.Urea, 5);
          2019-07-19  [Fertiliser].Apply(111.1, Fertiliser.Types.Urea, 5);
          2019-08-20  [Fertiliser].Apply(111.1, Fertiliser.Types.Urea, 5);
          2019-09-27  [Fertiliser].Apply(111.1, Fertiliser.Types.Urea, 5);
        Irrigation
        Operations IrrigationSchedule
        Manager CuttingManagement
```csharp
using System.Xml.Serialization;
using Models.PMF.Interfaces;
using Models.PMF;
using Models.Core;
using System.Collections.Generic;
using System;

namespace Models
{
    [Serializable] 
    [System.Xml.Serialization.XmlInclude(typeof(Model))]
    public class Script : Model
    {
        [Link(ByName = true)] Plant Oats;
        [Link] Clock Clock;

    
        [XmlIgnore] private RemovalFractions Remove { get; set; }
        
        [EventSubscribe("StartOfSimulation")]
        private void OnSimulationCommencing(object sender, EventArgs e)
        {
            Remove = new RemovalFractions();
        }

        public void DoCut(double LeafResidue, double StemResidue, double PanicleResidue, double GrainResidue)
        {
            double L = (double)Oats.FindByPath("Leaf.Live.Wt").Value;
            double LeafRemovalFraction = 0;
            if (L > 0)
                LeafRemovalFraction = (L - LeafResidue) / L;
            if (LeafRemovalFraction < 0)
                LeafRemovalFraction = 0;
               
            double S = (double)Oats.FindByPath("Stem.Live.Wt").Value;
            double StemRemovalFraction = 0;
            if (S > 0)
                StemRemovalFraction = (S - StemResidue) / S;               
            if (StemRemovalFraction < 0)
                StemRemovalFraction = 0;

            double P = (double)Oats.FindByPath("Panicle.Live.Wt").Value;
            double PanicleRemovalFraction = 0;
            if (P > 0)
                PanicleRemovalFraction = (P - PanicleResidue) / P;               
            if (PanicleRemovalFraction < 0)
                PanicleRemovalFraction = 0;

            double G = (double)Oats.FindByPath("Grain.Live.Wt").Value;
            double GrainRemovalFraction = 0;
            if (G > 0)
                GrainRemovalFraction = (G - GrainResidue) / G;               
            if (GrainRemovalFraction < 0)
                GrainRemovalFraction = 0;
               
            Remove.SetFractionToRemove("Leaf", LeafRemovalFraction);
            Remove.SetFractionToRemove("Stem", StemRemovalFraction);
            Remove.SetFractionToRemove("Panicle", PanicleRemovalFraction);
            Remove.SetFractionToRemove("Grain", GrainRemovalFraction);
            Remove.SetFractionToResidue("Leaf", 0.0);
            Remove.SetFractionToResidue("Stem", 0.0);
            Remove.SetFractionToResidue("Panicle", 0.0);
            Remove.SetFractionToResidue("Grain", 0.0);
            Oats.RemoveBiomass("Cut", Remove);
        }
        
    }
}
```
        Report: EventNames=[Clock].DoReport
          VariableNames:
            [Clock].Today
            [Oats].Phenology.Zadok.Stage
            [Oats].Phenology.ThermalTime
            [Oats].Structure.HaunStage
            [Oats].Phenology.CurrentStageName
            [Oats].Phenology.Stage
            [Oats].AboveGround.Wt
            [Oats].AboveGroundLive.Wt
            [Oats].Ear.Wt
            [Oats].Stem.Live.Wt
            [Oats].Stem.SenescenceRate
            [Oats].Structure.MeanTillerGrowthRate.TillerGrowthRate
            [Oats].Leaf.Live.Wt
            [Oats].Leaf.SpecificArea
            [Oats].Leaf.Fw
            [Oats].AboveGroundDead.Wt
            [Oats].Stem.Dead.Wt
            [Oats].Panicle.Live.Wt
            [Oats].Leaf.LAI
            [Oats].Grain.Wt
            [Oats].Leaf.Height
            [Oats].Root.Wt
            [Oats].Phenology.CurrentPhase.Name
            [Oats].Structure.Height
            [Oats].Structure.BranchNumber
            [Oats].Structure.TotalStemPopn
            [Oats].Structure.StemSenescenceAge
            [Oats].Structure.MainStemPopn
            [Oats].Structure.BranchMortality.MortalityPhase
            [Oats].Structure.LeafTipsAppeared
            [Oats].Leaf.Fw
            [Oats].Leaf.Fn
            [Weather].Rain
            [Soil].SoilWater.WinterU
            [Soil].SoilWater.Eo
            [Soil].SoilWater.Es
            [Soil].SoilWater.Drainage
            [Soil].SoilWater.Runoff
            [Soil].SoilWater.pond
            [Soil].SoilWater.SWmm[1] as SW0_10cm
            [Soil].SoilWater.SWmm[2] as SW10_20cm
            [Soil].SoilWater.SWmm[3] as SW20_30cm
            [Soil].SoilWater.SWmm[4] as SW30_40cm
            [Soil].SoilWater.SWmm[5] as SW40_50cm
            [Soil].SoilWater.SWmm[6] as SW50_60cm
            [Soil].SoilWater.SWmm[7] as SW60_70cm
            sum([Soil].SoilWater.SWmm[1:7]) as SW0_70cm
            (sum([Soil].SoilWater.SWmm[1:7]) - sum([Soil].LL15mm[1:7])) as ESW0_70cm
            sum([Soil].SoilWater.SWmm[1:3]) as SW0_30cm
            sum([Soil].SoilNitrogen.NO3.kgha[1:10]) as TotalNO3
            sum ([Soil].SoilNitrogen.TotalN) as TotalN
            [Soil].SoilWater.SWmm
            sum ([Soil].SoilNitrogen.FOMN) as FOMN
            sum ([Soil].SoilNitrogen.HumicN) as HumicN
            sum ([Soil].SoilNitrogen.MicrobialN) as MicN
            sum ([soil].SoilNitrogen.MineralisedN) as MinN
            sum ([soil].SoilNitrogen.n2o_atm) as N2O
            sum ([soil].SoilNitrogen.NH4.kgha) as NH4
            sum ([soil].SoilNitrogen.Nitrification) as Nitrification
            sum ([soil].SoilNitrogen.Urea.kgha) as Urea
            sum ([soil].SoilWater.FlowNH4) as NH4flow
            [soil].SoilWater.FlowNO3[10] as NO3flow
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